*Heading
** Job name: plastic_beam Model name: Model-1
** Generated by: Abaqus/CAE 2018
*Preprint, echo=NO, model=NO, history=NO, contact=NO
**
** PARTS
**
*Part, name=beam
*Node
      1,          50.,           5.
      2,   47.2296562,           5.
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*Element, type=CPS8R
  1,    1,    2,   53,   52,  460,  461,  462,  463
  2,    2,    3,   54,   53,  464,  465,  466,  461
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*Nset, nset=_PickedSet2, internal, generate
    1,  1317,     1
*Elset, elset=_PickedSet2, internal, generate
   1,  400,    1
** Section: PlaneStressProperties
*Solid Section, elset=_PickedSet2, material=steel
5.,
*End Part
**
**
** ASSEMBLY
**
*Assembly, name=Assembly
**
*Instance, name=beam-1, part=beam
*End Instance
**
*Nset, nset=_PickedSet4, internal, instance=beam-1
   51,  102,  153,  204,  255,  306
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*Elset, elset=_PickedSet4, internal, instance=beam-1, generate
  50,  400,   50
*Elset, elset=__PickedSurf5_S4, internal, instance=beam-1, generate
   1,  351,   50
*Surface, type=ELEMENT, name=_PickedSurf5, internal
__PickedSurf5_S4, S4
*End Assembly
*Amplitude, name=Amp-1
             0.,              0.,              1.,              1.,              2.,              0.
**
** MATERIALS
**
*Material, name=steel
*Elastic
 2.1083e+11, 0.3
*Plastic
 2.002e+08,      0.
  2.46e+08, 0.02374
  2.94e+08, 0.04784
  3.74e+08, 0.09436
  4.37e+08,  0.1388
   4.8e+08,  0.1814
** ----------------------------------------------------------------
**
** STEP: Step-1
**
*Step, name=Step-1, nlgeom=NO
*Static
0.05, 2., 2e-05, 0.2
**
** BOUNDARY CONDITIONS
**
** Name: Fixed Type: Symmetry/Antisymmetry/Encastre
*Boundary
_PickedSet4, ENCASTRE
**
** LOADS
**
** Name: Load-1   Type: Surface traction
*Dsload, amplitude=Amp-1
_PickedSurf5, TRSHR, 5e+06, 0., -1., 0.
**
** OUTPUT REQUESTS
**
*Restart, write, frequency=0
**
** FIELD OUTPUT: F-Output-1
**
*Output, field, variable=PRESELECT
**
** HISTORY OUTPUT: H-Output-1
**
*Output, history, variable=PRESELECT
*End Step
